*Heading
 Single element test for Fiber-direction response
**
*Parameter
IncrementSize = 0.02
U1= 0.05
** NODES
**
*Node
      1,            0.,            0.,            0.
      2,           1.0,            0.,            0.
      3,           1.0,           1.0,            0.
      4,            0.,           1.0,            0.
      5,            0.,            0.,            1.0
      6,           1.0,            0.,            1.0
      7,           1.0,           1.0,            1.0
      8,            0.,           1.0,            1.0
*NSET, NSET=X+
  2, 3, 6, 7
*NSET, NSET=X-
  1, 4, 5, 8
*NSET, NSET=Y+
  3, 4, 7, 8
*NSET, NSET=Y-
  1, 2, 5, 6
*NSET, NSET=Z+
  5, 6, 7, 8
*NSET, NSET=Z-
  1, 2, 3, 4
**
** Elements
**
*Element, type=C3D8R, ELSET=ALL_ELEMS
  1, 1, 2, 3, 4, 5, 6, 7, 8
**
** Properties
**
*Solid Section, elset=ALL_ELEMS, material=UMAT_MAT-C3D8R, controls=C-1
*Section Controls, name=C-1, hourglass=ENHANCED
**
** MATERIALS
**
*Material, name=UMAT_MAT-C3D8R
*Depvar
      1,
*User Material, constants=27
44800.,12100.,12100.,   0.3,   0.3,   0.3, 3400., 3400.
 3400.,    0.,    0.,    0.,    0.,    0.,    0.,    0.
 1006., -487.,   46., -132.,   46., -132.,    0.,    0.
  49.5,  49.5,  49.5
**
** In each step, NLGEOM=YES must be used. This is the default setting.
**
** BOUNDARY CONDITIONS
**
** Name: BC-2 Type: Displacement/Rotation
*Boundary
X-, 1, 1
** ----------------------------------------------------------------
**
** STEP: Step-1
**
*Step, name=Step-1, nlgeom=YES, inc=100000
*Static, direct
<IncrementSize>, 1.,
**
** Loading
**
*Amplitude, name=Instant
             0.,              1.,              1.,              1.
*Amplitude, name=Lin
             0.,              0.,              1.,              1.
**
** Name: BC-2 Type: Displacement/Rotation
*Boundary, op=NEW, amplitude=Instant
X-, 1, 1
** Name: BC-3 Type: Displacement/Rotation
*Boundary, op=NEW, amplitude=Lin
X+, 1, 1, <U1>
** Name: BC-4 Type: Displacement/Rotation
*Boundary, op=NEW, amplitude=Instant
Y-, 2, 2
** Name: BC-5 Type: Displacement/Rotation
*Boundary, op=NEW, amplitude=Instant
Z-, 3, 3
**
** OUTPUT REQUESTS
**
*Restart, write, frequency=0
**
** OUTPUT REQUESTS
**
** FIELD OUTPUT: F-Output-1
**
*Output, field, variable=PRESELECT
**
** HISTORY OUTPUT: H-Output-2
**
*Output, history
*Element Output, elset=ALL_ELEMS
S11, LE11
**
*End Step
